# OpenSim document version 40500
MocoStudy example2DWalking_StepTimeAsymmetry:
  MocoProblem problem:
    MocoPhase phases:
      ModelProcessor model: filepath=2D_gait.osim
        operators: ModOpTendonComplianceDynamicsModeDGF: mode=implicit
      MocoInitialBounds time_initial_bounds: bounds=0
      MocoFinalBounds time_final_bounds: bounds=0.94
      state_infos:
        MocoVariableInfo /jointset/groundPelvis/pelvis_tilt/value: bounds=(-0.3490659 0.3490659)
        MocoVariableInfo /jointset/groundPelvis/pelvis_tx/value: bounds=(0 2) initial_bounds=0
        MocoVariableInfo /jointset/groundPelvis/pelvis_ty/value: bounds=(0.75 1.25)
        MocoVariableInfo /jointset/hip_l/hip_flexion_l/value: bounds=(-0.1745329 1.047198)
        MocoVariableInfo /jointset/hip_r/hip_flexion_r/value: bounds=(-0.1745329 1.047198)
        MocoVariableInfo /jointset/knee_l/knee_angle_l/value: bounds=(-0.8726646 0)
        MocoVariableInfo /jointset/knee_r/knee_angle_r/value: bounds=(-0.8726646 0)
        MocoVariableInfo /jointset/ankle_l/ankle_angle_l/value: bounds=(-0.2617994 0.4363323)
        MocoVariableInfo /jointset/ankle_r/ankle_angle_r/value: bounds=(-0.2617994 0.4363323)
        MocoVariableInfo /jointset/lumbar/lumbar/value: bounds=(0 0.3490659)
      goals:
        MocoPeriodicityGoal periodicity:
          state_pairs:
            MocoPeriodicityGoalPair: initial_variable=/hamstrings_r/activation final_variable=/hamstrings_r/activation
            MocoPeriodicityGoalPair: initial_variable=/bifemsh_r/activation final_variable=/bifemsh_r/activation
            MocoPeriodicityGoalPair: initial_variable=/glut_max_r/activation final_variable=/glut_max_r/activation
            MocoPeriodicityGoalPair: initial_variable=/iliopsoas_r/activation final_variable=/iliopsoas_r/activation
            MocoPeriodicityGoalPair: initial_variable=/rect_fem_r/activation final_variable=/rect_fem_r/activation
            MocoPeriodicityGoalPair: initial_variable=/vasti_r/activation final_variable=/vasti_r/activation
            MocoPeriodicityGoalPair: initial_variable=/gastroc_r/activation final_variable=/gastroc_r/activation
            MocoPeriodicityGoalPair: initial_variable=/soleus_r/activation final_variable=/soleus_r/activation
            MocoPeriodicityGoalPair: initial_variable=/tib_ant_r/activation final_variable=/tib_ant_r/activation
            MocoPeriodicityGoalPair: initial_variable=/hamstrings_l/activation final_variable=/hamstrings_l/activation
            MocoPeriodicityGoalPair: initial_variable=/bifemsh_l/activation final_variable=/bifemsh_l/activation
            MocoPeriodicityGoalPair: initial_variable=/glut_max_l/activation final_variable=/glut_max_l/activation
            MocoPeriodicityGoalPair: initial_variable=/iliopsoas_l/activation final_variable=/iliopsoas_l/activation
            MocoPeriodicityGoalPair: initial_variable=/rect_fem_l/activation final_variable=/rect_fem_l/activation
            MocoPeriodicityGoalPair: initial_variable=/vasti_l/activation final_variable=/vasti_l/activation
            MocoPeriodicityGoalPair: initial_variable=/gastroc_l/activation final_variable=/gastroc_l/activation
            MocoPeriodicityGoalPair: initial_variable=/soleus_l/activation final_variable=/soleus_l/activation
            MocoPeriodicityGoalPair: initial_variable=/tib_ant_l/activation final_variable=/tib_ant_l/activation
            MocoPeriodicityGoalPair: initial_variable=/jointset/groundPelvis/pelvis_tilt/value
                final_variable=/jointset/groundPelvis/pelvis_tilt/value
            MocoPeriodicityGoalPair: initial_variable=/jointset/groundPelvis/pelvis_tilt/speed
                final_variable=/jointset/groundPelvis/pelvis_tilt/speed
            MocoPeriodicityGoalPair: initial_variable=/jointset/groundPelvis/pelvis_tx/speed
                final_variable=/jointset/groundPelvis/pelvis_tx/speed
            MocoPeriodicityGoalPair: initial_variable=/jointset/groundPelvis/pelvis_ty/value
                final_variable=/jointset/groundPelvis/pelvis_ty/value
            MocoPeriodicityGoalPair: initial_variable=/jointset/groundPelvis/pelvis_ty/speed
                final_variable=/jointset/groundPelvis/pelvis_ty/speed
            MocoPeriodicityGoalPair: initial_variable=/jointset/hip_l/hip_flexion_l/value
                final_variable=/jointset/hip_l/hip_flexion_l/value
            MocoPeriodicityGoalPair: initial_variable=/jointset/hip_l/hip_flexion_l/speed
                final_variable=/jointset/hip_l/hip_flexion_l/speed
            MocoPeriodicityGoalPair: initial_variable=/jointset/hip_r/hip_flexion_r/value
                final_variable=/jointset/hip_r/hip_flexion_r/value
            MocoPeriodicityGoalPair: initial_variable=/jointset/hip_r/hip_flexion_r/speed
                final_variable=/jointset/hip_r/hip_flexion_r/speed
            MocoPeriodicityGoalPair: initial_variable=/jointset/knee_l/knee_angle_l/value
                final_variable=/jointset/knee_l/knee_angle_l/value
            MocoPeriodicityGoalPair: initial_variable=/jointset/knee_l/knee_angle_l/speed
                final_variable=/jointset/knee_l/knee_angle_l/speed
            MocoPeriodicityGoalPair: initial_variable=/jointset/knee_r/knee_angle_r/value
                final_variable=/jointset/knee_r/knee_angle_r/value
            MocoPeriodicityGoalPair: initial_variable=/jointset/knee_r/knee_angle_r/speed
                final_variable=/jointset/knee_r/knee_angle_r/speed
            MocoPeriodicityGoalPair: initial_variable=/jointset/ankle_l/ankle_angle_l/value
                final_variable=/jointset/ankle_l/ankle_angle_l/value
            MocoPeriodicityGoalPair: initial_variable=/jointset/ankle_l/ankle_angle_l/speed
                final_variable=/jointset/ankle_l/ankle_angle_l/speed
            MocoPeriodicityGoalPair: initial_variable=/jointset/ankle_r/ankle_angle_r/value
                final_variable=/jointset/ankle_r/ankle_angle_r/value
            MocoPeriodicityGoalPair: initial_variable=/jointset/ankle_r/ankle_angle_r/speed
                final_variable=/jointset/ankle_r/ankle_angle_r/speed
            MocoPeriodicityGoalPair: initial_variable=/jointset/lumbar/lumbar/value
                final_variable=/jointset/lumbar/lumbar/value
            MocoPeriodicityGoalPair: initial_variable=/jointset/lumbar/lumbar/speed
                final_variable=/jointset/lumbar/lumbar/speed
          control_pairs: MocoPeriodicityGoalPair: initial_variable=/lumbarAct final_variable=/lumbarAct
        MocoAverageSpeedGoal speed: desired_average_speed=1 [m/s]
        MocoControlGoal effort: weight=10 divide_by_displacement=true exponent=3
        MocoStepTimeAsymmetryGoal goal: weight=5 target_asymmetry=0.1 contact_force_threshold=25 [Newtons]
            contact_detection_smoothing=0.4 asymmetry_smoothing=3
          MocoStepTimeAsymmetryGoalGroup left_contact_group: contact_force_paths=(contactHeel_l contactFront_l)
              foot_position_contact_force_path=contactHeel_l
          MocoStepTimeAsymmetryGoalGroup right_contact_group: contact_force_paths=(contactHeel_r contactFront_r)
              foot_position_contact_force_path=contactHeel_r
  MocoCasADiSolver solver:
    num_mesh_intervals: 100
    verbosity: 2
    optim_max_iterations: 2000
    optim_convergence_tolerance: 0.0001
    optim_constraint_tolerance: 0.0001
    guess_file: example2DWalking_StepTimeAsymmetry_solution.sto
